<Node dt="0.01" gravity="0 0 0 " name="root"><InteractiveCamera distance="1" fieldOfView="34.40363640013896" orientation="0.483536034822464 0.20870360732078552 0.33687159419059753 0.7804827094078064 " position="7.481131553649902 -6.5076398849487305 5.34366512298584 " /><GenericConstraintSolver maxIterations="1000" tolerance="1e-6" /><FreeMotionAnimationLoop /><CollisionPipeline depth="6" /><BruteForceDetection /><LocalMinDistance alarmDistance="0.10000000149011612" angleCone="0.0" contactDistance="0.009999999776482582" /><CollisionGroup /><CollisionResponse response="FrictionContact" /><LightManager /><RequiredPlugin pluginName="Sensable" /><RequiredPlugin pluginName="SurfLabHaptic" /><RequiredPlugin pluginName="SaLua" /><LuaController listening="1" source="changeInstrumentController.lua" /><Node name="PHANToM 1" tags="haptic"><Node name="RigidLayer"><NewOmniDriver alignOmniWithCamera="false" desirePosition="0 0 0 " deviceName="PHANToM 1" forceScale="0.0007999999797903001" listening="true" name="driver" orientationBase="0 0 0 1 " permanent="true" positionBase="0 0 0 " scale="25.0" tags="PHANToM 1__omni" /><MechanicalObject free_position="0 0 0 0 0 0 1" name="ToolRealPosition" position="0 0 0 0 0 0 1" tags="PHANToM 1__omni" template="Rigid" /><Node name="Tool"><MechanicalObject name="RealPosition" template="Rigid" /><SubsetMapping indices="0" /></Node></Node><Node name="Instruments_of_PHANToM 1"><Gravity gravity="0 0 0" /><EulerImplicitSolver rayleighMass="0.0" rayleighStiffness="0.0" /><CGLinearSolver iterations="100" threshold="1.0e-20" tolerance="1.0e-20" /><MechanicalObject free_position="0 0 0 0 0 0 1 0 0 0 0 0 0 1 0 0 0 0 0 0 1 0 0 0 0 0 0 1 0 0 0 0 0 0 1 0 0 0 0 0 0 1" name="instrumentState" position="0 0 0 0 0 0 1 0 0 0 0 0 0 1 0 0 0 0 0 0 1 0 0 0 0 0 0 1 0 0 0 0 0 0 1 0 0 0 0 0 0 1" template="Rigid3d" /><UniformMass name="mass" template="Rigid3d" totalmass="15.0" /><LCPForceFeedback activate="1" forceCoef="0.25" tags="PHANToM 1__omni" /><RestShapeSpringsForceField angularStiffness="1e12" external_rest_shape="../RigidLayer/ToolRealPosition" points="0" stiffness="1e12" template="Rigid" /><UncoupledConstraintCorrection /></Node></Node><Node name="aa1" tags="haptic"><Node name="RigidLayer"><NewOmniDriver alignOmniWithCamera="false" desirePosition="0 0 0 " deviceName="aa1" forceScale="0.0007999999797903001" listening="true" name="driver" orientationBase="0 0 0 1 " permanent="true" positionBase="0 0 0 " scale="25.0" tags="aa1__omni" /><MechanicalObject free_position="0 0 0 0 0 0 1" name="ToolRealPosition" position="0 0 0 0 0 0 1" tags="aa1__omni" template="Rigid" /><Node name="Tool"><MechanicalObject name="RealPosition" template="Rigid" /><SubsetMapping indices="0" /></Node></Node><Node name="Instruments_of_aa1"><Gravity gravity="0 0 0" /><EulerImplicitSolver rayleighMass="0.0" rayleighStiffness="0.0" /><CGLinearSolver iterations="100" threshold="1.0e-20" tolerance="1.0e-20" /><MechanicalObject free_position="0 0 0 0 0 0 1 0 0 0 0 0 0 1 0 0 0 0 0 0 1 0 0 0 0 0 0 1 0 0 0 0 0 0 1 0 0 0 0 0 0 1" name="instrumentState" position="0 0 0 0 0 0 1 0 0 0 0 0 0 1 0 0 0 0 0 0 1 0 0 0 0 0 0 1 0 0 0 0 0 0 1 0 0 0 0 0 0 1" template="Rigid3d" /><UniformMass name="mass" template="Rigid3d" totalmass="15.0" /><LCPForceFeedback activate="1" forceCoef="0.25" tags="aa1__omni" /><RestShapeSpringsForceField angularStiffness="1e12" external_rest_shape="../RigidLayer/ToolRealPosition" points="0" stiffness="1e12" template="Rigid" /><UncoupledConstraintCorrection /></Node></Node><Node name="SolverNode"><Gravity gravity="0.0 0.0 -9.8100004196167 " /><EulerImplicitSolver rayleighMass="0.05" rayleighStiffness="0.0" /><CGLinearSolver iterations="50" threshold="1.0e-6" tolerance="1.0e-10" /><PositionalLight color="1.0 1.0 1.0 " name="Lamp" position="4.076245307922363 1.0054539442062378 5.903861999511719 " /><Node name="myCurve2_001"><HexahedronSetTopologyContainer hexahedra="0 1 2 3 4 5 6 7 4 5 6 7 8 9 10 11 8 9 10 11 12 13 14 15 12 13 14 15 16 17 18 19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" name="myCurve2_001-topology" points="0.0487257950008 0.0385550744832 0.0502573922276 0.047304097563 0.0327588133514 0.0474296659231 0.0419506020844 0.0354341231287 0.0446374043822 0.0433722995222 0.0412303842604 0.0474651306868 0.0512024015188 0.0397071316838 0.0464988425374 0.0496851764619 0.0338663905859 0.0438159927726 0.0442595407367 0.0365081094205 0.0411331430078 0.0457767657936 0.0423488467932 0.0438159927726 0.0535897612572 0.0407962314785 0.042626939714 0.0519884154201 0.0349170602858 0.04008038342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" /><MechanicalObject name="MO" rotation="0.0 0.0 0.0 " scale3d="1.0 1.0 1.0 " template="Vec3d" translation="0.0 0.0 0.0 " /><HexahedronSetTopologyModifier removeIsolated="false" /><HexahedronSetTopologyAlgorithms template="Vec3d" /><HexahedronSetGeometryAlgorithms template="Vec3d" /><UniformMass mass="0.009999999776482582" /><HexahedronFEMForceField damping="0.10000000149011612" method="large" poissonRatio="0.44999998807907104" rayleighStiffness="0.0" youngModulus="3000.0" /><DiagonalVelocityDampingForceField dampingCoefficient="0.05 0.05 0.05 0.05 0.05 0.05" template="Vec3d" /><UncoupledConstraintCorrection /><Node name="quad-surface"><QuadSetTopologyContainer name="myCurve2_001-quadSurf" /><QuadSetGeometryAlgorithms template="Vec3d" /><QuadSetTopologyModifier /><QuadSetTopologyAlgorithms template="Vec3d" /><Hexa2QuadTopologicalMapping input="@../myCurve2_001-topology" output="@myCurve2_001-quadSurf" /><OglModel name="myCurve2_001-visual" /><IdentityMapping input="@../MO" output="@myCurve2_001-visual" /><Node name="triangle-surface"><TriangleSetTopologyContainer name="myCurve2_001-triSurf" /><TriangleSetTopologyModifier /><TriangleSetTopologyAlgorithms template="Vec3d" /><TriangleSetGeometryAlgorithms template="Vec3d" /><Quad2TriangleTopologicalMapping input="@../myCurve2_001-quadSurf" output="@myCurve2_001-triSurf" /><TriangleModel bothSide="0" contactFriction="500.0" contactStiffness="500.0" group="1" moving="1" selfCollision="0" simulated="1" tags="HapticSurfaceCurve" /></Node></Node></Node><Node name="myCurve3_001"><HexahedronSetTopologyContainer hexahedra="0 1 2 3 4 5 6 7 4 5 6 7 8 9 10 11 8 9 10 11 12 13 14 15 12 13 14 15 16 17 18 19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" name="myCurve3_001-topology" points="0.0434382632375 0.0666202232242 -0.219467833638 0.0458753108978 0.0580492094159 -0.227816984057 0.0474497377872 0.0667253881693 -0.236264154315 0.0450126901269 0.075296394527 -0.227915003896 0.0518810339272 0.0669319480658 -0.217668533325 0.0536823496222 0.05833722651 -0.226153537631 0.0550797246397 0.0670067965984 -0.234638541937 0.0532784089446 0.0756015181541 -0.226153537631 0.0603888817132 0.0670174285769 -0.216270044446 0.0615925900638 0.0584163405001 -0.224853858352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" /><MechanicalObject name="MO" rotation="0.0 0.0 0.0 " scale3d="1.0 1.0 1.0 " template="Vec3d" translation="0.0 0.0 0.0 " /><HexahedronSetTopologyModifier removeIsolated="false" /><HexahedronSetTopologyAlgorithms template="Vec3d" /><HexahedronSetGeometryAlgorithms template="Vec3d" /><UniformMass mass="0.009999999776482582" /><HexahedronFEMForceField damping="0.10000000149011612" method="large" poissonRatio="0.44999998807907104" rayleighStiffness="0.0" youngModulus="3000.0" /><DiagonalVelocityDampingForceField dampingCoefficient="0.05 0.05 0.05 0.05 0.05 0.05" template="Vec3d" /><UncoupledConstraintCorrection /><Node name="quad-surface"><QuadSetTopologyContainer name="myCurve3_001-quadSurf" /><QuadSetGeometryAlgorithms template="Vec3d" /><QuadSetTopologyModifier /><QuadSetTopologyAlgorithms template="Vec3d" /><Hexa2QuadTopologicalMapping input="@../myCurve3_001-topology" output="@myCurve3_001-quadSurf" /><OglModel name="myCurve3_001-visual" /><IdentityMapping input="@../MO" output="@myCurve3_001-visual" /><Node name="triangle-surface"><TriangleSetTopologyContainer name="myCurve3_001-triSurf" /><TriangleSetTopologyModifier /><TriangleSetTopologyAlgorithms template="Vec3d" /><TriangleSetGeometryAlgorithms template="Vec3d" /><Quad2TriangleTopologicalMapping input="@../myCurve3_001-quadSurf" output="@myCurve3_001-triSurf" /><TriangleModel bothSide="0" contactFriction="500.0" contactStiffness="500.0" group="1" moving="1" selfCollision="0" simulated="1" tags="HapticSurfaceCurve" /></Node></Node></Node><Node name="myCurve4_001"><HexahedronSetTopologyContainer hexahedra="0 1 2 3 4 5 6 7 4 5 6 7 8 9 10 11 8 9 10 11 12 13 14 15 12 13 14 15 16 17 18 19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" name="myCurve4_001-topology" points="0.212626695633 0.0533442609012 -0.215093374252 0.212036937475 0.0599931180477 -0.221423313022 0.20940130949 0.0537945367396 -0.227688640356 0.209991067648 0.0471456795931 -0.221358701587 0.207705110312 0.0540877617896 -0.213619232178 0.206603422761 0.0608140900731 -0.219797104597 0.203673392534 0.0546600595117 -0.225974977016 0.204775080085 0.0479337349534 -0.219797104597 0.202619895339 0.0547621957958 -0.21175186336 0.201079145074 0.0615468919277 -0.217769920826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" /><MechanicalObject name="MO" rotation="0.0 0.0 0.0 " scale3d="1.0 1.0 1.0 " template="Vec3d" translation="0.0 0.0 0.0 " /><HexahedronSetTopologyModifier removeIsolated="false" /><HexahedronSetTopologyAlgorithms template="Vec3d" /><HexahedronSetGeometryAlgorithms template="Vec3d" /><UniformMass mass="0.009999999776482582" /><HexahedronFEMForceField damping="0.10000000149011612" method="large" poissonRatio="0.44999998807907104" rayleighStiffness="0.0" youngModulus="3000.0" /><DiagonalVelocityDampingForceField dampingCoefficient="0.05 0.05 0.05 0.05 0.05 0.05" template="Vec3d" /><UncoupledConstraintCorrection /><Node name="quad-surface"><QuadSetTopologyContainer name="myCurve4_001-quadSurf" /><QuadSetGeometryAlgorithms template="Vec3d" /><QuadSetTopologyModifier /><QuadSetTopologyAlgorithms template="Vec3d" /><Hexa2QuadTopologicalMapping input="@../myCurve4_001-topology" output="@myCurve4_001-quadSurf" /><OglModel name="myCurve4_001-visual" /><IdentityMapping input="@../MO" output="@myCurve4_001-visual" /><Node name="triangle-surface"><TriangleSetTopologyContainer name="myCurve4_001-triSurf" /><TriangleSetTopologyModifier /><TriangleSetTopologyAlgorithms template="Vec3d" /><TriangleSetGeometryAlgorithms template="Vec3d" /><Quad2TriangleTopologicalMapping input="@../myCurve4_001-quadSurf" output="@myCurve4_001-triSurf" /><TriangleModel bothSide="0" contactFriction="500.0" contactStiffness="500.0" group="1" moving="1" selfCollision="0" simulated="1" tags="HapticSurfaceCurve" /></Node></Node></Node><Node name="myCurve5_001"><HexahedronSetTopologyContainer hexahedra="0 1 2 3 4 5 6 7 4 5 6 7 8 9 10 11 8 9 10 11 12 13 14 15 12 13 14 15 16 17 18 19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" name="myCurve5_001-topology" points="0.195930853486 0.0552331879735 -0.227425172925 0.196978896856 0.0621965043247 -0.234181419015 0.19875715673 0.0553782097995 -0.240932837129 0.197709113359 0.0484148971736 -0.234176591039 0.189085185528 0.0548757761717 -0.229081347585 0.190533950925 0.0618600472808 -0.235741227865 0.192692875862 0.055061660707 -0.242401108146 0.191244110465 0.0480773895979 -0.235741227865 0.182318240404 0.054531738162 -0.23112128675 0.184111788869 0.0615335851908 -0.237677976489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" /><MechanicalObject name="MO" rotation="0.0 0.0 0.0 " scale3d="1.0 1.0 1.0 " template="Vec3d" translation="0.0 0.0 0.0 " /><HexahedronSetTopologyModifier removeIsolated="false" /><HexahedronSetTopologyAlgorithms template="Vec3d" /><HexahedronSetGeometryAlgorithms template="Vec3d" /><UniformMass mass="0.009999999776482582" /><HexahedronFEMForceField damping="0.10000000149011612" method="large" poissonRatio="0.44999998807907104" rayleighStiffness="0.0" youngModulus="3000.0" /><DiagonalVelocityDampingForceField dampingCoefficient="0.05 0.05 0.05 0.05 0.05 0.05" template="Vec3d" /><UncoupledConstraintCorrection /><Node name="quad-surface"><QuadSetTopologyContainer name="myCurve5_001-quadSurf" /><QuadSetGeometryAlgorithms template="Vec3d" /><QuadSetTopologyModifier /><QuadSetTopologyAlgorithms template="Vec3d" /><Hexa2QuadTopologicalMapping input="@../myCurve5_001-topology" output="@myCurve5_001-quadSurf" /><OglModel name="myCurve5_001-visual" /><IdentityMapping input="@../MO" output="@myCurve5_001-visual" /><Node name="triangle-surface"><TriangleSetTopologyContainer name="myCurve5_001-triSurf" /><TriangleSetTopologyModifier /><TriangleSetTopologyAlgorithms template="Vec3d" /><TriangleSetGeometryAlgorithms template="Vec3d" /><Quad2TriangleTopologicalMapping input="@../myCurve5_001-quadSurf" output="@myCurve5_001-triSurf" /><TriangleModel bothSide="0" contactFriction="500.0" contactStiffness="500.0" group="1" moving="1" selfCollision="0" simulated="1" tags="HapticSurfaceCurve" /></Node></Node></Node><Node name="myCurve6_001"><HexahedronSetTopologyContainer hexahedra="0 1 2 3 4 5 6 7 4 5 6 7 8 9 10 11 8 9 10 11 12 13 14 15 12 13 14 15 16 17 18 19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" name="myCurve6_001-topology" points="0.154508113861 0.0869770422578 -0.0276497732848 0.154914453626 0.0881900116801 -0.0288611557335 0.155219882727 0.0869137570262 -0.0300366263837 0.154813542962 0.0857007876039 -0.028825243935 0.126239925623 0.0885322317481 -0.037435516715 0.126812264323 0.0897355005145 -0.0385880842805 0.127182334661 0.0884554758668 -0.0397406518459 0.126609995961 0.0872522071004 -0.0385880842805 0.105717159808 0.0907759740949 -0.0472963601351 0.106517121196 0.0919525772333 -0.0483353510499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" /><MechanicalObject name="MO" rotation="0.0 0.0 0.0 " scale3d="1.0 1.0 1.0 " template="Vec3d" translation="0.0 0.0 0.0 " /><HexahedronSetTopologyModifier removeIsolated="false" /><HexahedronSetTopologyAlgorithms template="Vec3d" /><HexahedronSetGeometryAlgorithms template="Vec3d" /><UniformMass mass="0.009999999776482582" /><HexahedronFEMForceField damping="0.10000000149011612" method="large" poissonRatio="0.44999998807907104" rayleighStiffness="0.0" youngModulus="3000.0" /><DiagonalVelocityDampingForceField dampingCoefficient="0.05 0.05 0.05 0.05 0.05 0.05" template="Vec3d" /><UncoupledConstraintCorrection /><Node name="quad-surface"><QuadSetTopologyContainer name="myCurve6_001-quadSurf" /><QuadSetGeometryAlgorithms template="Vec3d" /><QuadSetTopologyModifier /><QuadSetTopologyAlgorithms template="Vec3d" /><Hexa2QuadTopologicalMapping input="@../myCurve6_001-topology" output="@myCurve6_001-quadSurf" /><OglModel name="myCurve6_001-visual" /><IdentityMapping input="@../MO" output="@myCurve6_001-visual" /><Node name="triangle-surface"><TriangleSetTopologyContainer name="myCurve6_001-triSurf" /><TriangleSetTopologyModifier /><TriangleSetTopologyAlgorithms template="Vec3d" /><TriangleSetGeometryAlgorithms template="Vec3d" /><Quad2TriangleTopologicalMapping input="@../myCurve6_001-quadSurf" output="@myCurve6_001-triSurf" /><TriangleModel bothSide="0" contactFriction="500.0" contactStiffness="500.0" group="1" moving="1" selfCollision="0" simulated="1" tags="HapticSurfaceCurve" /></Node></Node></Node><Node name="myCurve7_001"><HexahedronSetTopologyContainer hexahedra="0 1 2 3 4 5 6 7 4 5 6 7 8 9 10 11 8 9 10 11 12 13 14 15 12 13 14 15 16 17 18 19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" name="myCurve7_001-topology" points="0.109227485955 0.0984972566366 -0.0399889089167 0.110348016024 0.0939164310694 -0.0444355756044 0.107334516943 0.097516939044 -0.0489040873945 0.106213986874 0.102097764611 -0.0444574207067 0.113505423069 0.100681789219 -0.0413226559758 0.11438626796 0.0959786549211 -0.0456949546933 0.111062675714 0.0994209125638 -0.0500672534108 0.110181830823 0.104124046862 -0.045694950968 0.117628373206 0.102833069861 -0.0429577901959 0.118296049535 0.0980188250542 -0.0472461096942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" /><MechanicalObject name="MO" rotation="0.0 0.0 0.0 " scale3d="1.0 1.0 1.0 " template="Vec3d" translation="0.0 0.0 0.0 " /><HexahedronSetTopologyModifier removeIsolated="false" /><HexahedronSetTopologyAlgorithms template="Vec3d" /><HexahedronSetGeometryAlgorithms template="Vec3d" /><UniformMass mass="0.009999999776482582" /><HexahedronFEMForceField damping="0.10000000149011612" method="large" poissonRatio="0.44999998807907104" rayleighStiffness="0.0" youngModulus="3000.0" /><DiagonalVelocityDampingForceField dampingCoefficient="0.05 0.05 0.05 0.05 0.05 0.05" template="Vec3d" /><UncoupledConstraintCorrection /><Node name="quad-surface"><QuadSetTopologyContainer name="myCurve7_001-quadSurf" /><QuadSetGeometryAlgorithms template="Vec3d" /><QuadSetTopologyModifier /><QuadSetTopologyAlgorithms template="Vec3d" /><Hexa2QuadTopologicalMapping input="@../myCurve7_001-topology" output="@myCurve7_001-quadSurf" /><OglModel name="myCurve7_001-visual" /><IdentityMapping input="@../MO" output="@myCurve7_001-visual" /><Node name="triangle-surface"><TriangleSetTopologyContainer name="myCurve7_001-triSurf" /><TriangleSetTopologyModifier /><TriangleSetTopologyAlgorithms template="Vec3d" /><TriangleSetGeometryAlgorithms template="Vec3d" /><Quad2TriangleTopologicalMapping input="@../myCurve7_001-quadSurf" output="@myCurve7_001-triSurf" /><TriangleModel bothSide="0" contactFriction="500.0" contactStiffness="500.0" group="1" moving="1" selfCollision="0" simulated="1" tags="HapticSurfaceCurve" /></Node></Node></Node><Node name="myCurve8_001"><HexahedronSetTopologyContainer hexahedra="0 1 2 3 4 5 6 7 4 5 6 7 8 9 10 11 8 9 10 11 12 13 14 15 12 13 14 15 16 17 18 19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" name="myCurve8_001-topology" points="0.115727953613 0.122424863279 -0.0955918133259 0.117184743285 0.116400808096 -0.0976798757911 0.123090058565 0.118483133614 -0.0995673835278 0.121633261442 0.124507188797 -0.0974793210626 0.117792345583 0.121253341436 -0.0909837335348 0.119181707501 0.115267664194 -0.0932226479053 0.124929957092 0.117439374328 -0.0954615622759 0.123540595174 0.12342505157 -0.0932226479053 0.12012321502 0.12007496506 -0.0865793302655 0.121437393129 0.114127457142 -0.0889608263969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" /><MechanicalObject name="MO" rotation="0.0 0.0 0.0 " scale3d="1.0 1.0 1.0 " template="Vec3d" translation="0.0 0.0 0.0 " /><HexahedronSetTopologyModifier removeIsolated="false" /><HexahedronSetTopologyAlgorithms template="Vec3d" /><HexahedronSetGeometryAlgorithms template="Vec3d" /><UniformMass mass="0.009999999776482582" /><HexahedronFEMForceField damping="0.10000000149011612" method="large" poissonRatio="0.44999998807907104" rayleighStiffness="0.0" youngModulus="3000.0" /><DiagonalVelocityDampingForceField dampingCoefficient="0.05 0.05 0.05 0.05 0.05 0.05" template="Vec3d" /><UncoupledConstraintCorrection /><Node name="quad-surface"><QuadSetTopologyContainer name="myCurve8_001-quadSurf" /><QuadSetGeometryAlgorithms template="Vec3d" /><QuadSetTopologyModifier /><QuadSetTopologyAlgorithms template="Vec3d" /><Hexa2QuadTopologicalMapping input="@../myCurve8_001-topology" output="@myCurve8_001-quadSurf" /><OglModel name="myCurve8_001-visual" /><IdentityMapping input="@../MO" output="@myCurve8_001-visual" /><Node name="triangle-surface"><TriangleSetTopologyContainer name="myCurve8_001-triSurf" /><TriangleSetTopologyModifier /><TriangleSetTopologyAlgorithms template="Vec3d" /><TriangleSetGeometryAlgorithms template="Vec3d" /><Quad2TriangleTopologicalMapping input="@../myCurve8_001-quadSurf" output="@myCurve8_001-triSurf" /><TriangleModel bothSide="0" contactFriction="500.0" contactStiffness="500.0" group="1" moving="1" selfCollision="0" simulated="1" tags="HapticSurfaceCurve" /></Node></Node></Node><Node name="myCurve9_001"><HexahedronSetTopologyContainer hexahedra="0 1 2 3 4 5 6 7 4 5 6 7 8 9 10 11 8 9 10 11 12 13 14 15 12 13 14 15 16 17 18 19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" name="myCurve9_001-topology" points="-0.243438288569 0.173206925392 0.119028799236 -0.240861997008 0.172339454293 0.116268083453 -0.243631705642 0.172671079636 0.113579206169 -0.246207997203 0.173538550735 0.116339921951 -0.242573231459 0.176479890943 0.118475757539 -0.240135759115 0.175089001656 0.11580452323 -0.242932856083 0.175317391753 0.11313328892 -0.245370328426 0.17670828104 0.11580452323 -0.241530537605 0.179400399327 0.117564208806 -0.239277556539 0.177492931485 0.115054838359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" /><MechanicalObject name="MO" rotation="0.0 0.0 0.0 " scale3d="1.0 1.0 1.0 " template="Vec3d" translation="0.0 0.0 0.0 " /><HexahedronSetTopologyModifier removeIsolated="false" /><HexahedronSetTopologyAlgorithms template="Vec3d" /><HexahedronSetGeometryAlgorithms template="Vec3d" /><UniformMass mass="0.009999999776482582" /><HexahedronFEMForceField damping="0.10000000149011612" method="large" poissonRatio="0.44999998807907104" rayleighStiffness="0.0" youngModulus="3000.0" /><DiagonalVelocityDampingForceField dampingCoefficient="0.05 0.05 0.05 0.05 0.05 0.05" template="Vec3d" /><UncoupledConstraintCorrection /><Node name="quad-surface"><QuadSetTopologyContainer name="myCurve9_001-quadSurf" /><QuadSetGeometryAlgorithms template="Vec3d" /><QuadSetTopologyModifier /><QuadSetTopologyAlgorithms template="Vec3d" /><Hexa2QuadTopologicalMapping input="@../myCurve9_001-topology" output="@myCurve9_001-quadSurf" /><OglModel name="myCurve9_001-visual" /><IdentityMapping input="@../MO" output="@myCurve9_001-visual" /><Node name="triangle-surface"><TriangleSetTopologyContainer name="myCurve9_001-triSurf" /><TriangleSetTopologyModifier /><TriangleSetTopologyAlgorithms template="Vec3d" /><TriangleSetGeometryAlgorithms template="Vec3d" /><Quad2TriangleTopologicalMapping input="@../myCurve9_001-quadSurf" output="@myCurve9_001-triSurf" /><TriangleModel bothSide="0" contactFriction="500.0" contactStiffness="500.0" group="1" moving="1" selfCollision="0" simulated="1" tags="HapticSurfaceCurve" /></Node></Node></Node><Node name="myCurve10_001"><HexahedronSetTopologyContainer hexahedra="0 1 2 3 4 5 6 7 4 5 6 7 8 9 10 11 8 9 10 11 12 13 14 15 12 13 14 15 16 17 18 19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" name="myCurve10_001-topology" points="-0.22987408936 0.194118887186 0.12901045382 -0.232353359461 0.196721285582 0.127442523837 -0.229319915175 0.198955118656 0.126353546977 -0.226840645075 0.196352720261 0.12792147696 -0.229883491993 0.192808076739 0.126491695642 -0.232361659408 0.195590153337 0.125268414617 -0.229328632355 0.197753980756 0.124045133591 -0.22685046494 0.194971904159 0.125268414617 -0.230142757297 0.191676020622 0.124016597867 -0.232587188482 0.194608643651 0.123120985925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" /><MechanicalObject name="MO" rotation="0.0 0.0 0.0 " scale3d="1.0 1.0 1.0 " template="Vec3d" translation="0.0 0.0 0.0 " /><HexahedronSetTopologyModifier removeIsolated="false" /><HexahedronSetTopologyAlgorithms template="Vec3d" /><HexahedronSetGeometryAlgorithms template="Vec3d" /><UniformMass mass="0.009999999776482582" /><HexahedronFEMForceField damping="0.10000000149011612" method="large" poissonRatio="0.44999998807907104" rayleighStiffness="0.0" youngModulus="3000.0" /><DiagonalVelocityDampingForceField dampingCoefficient="0.05 0.05 0.05 0.05 0.05 0.05" template="Vec3d" /><UncoupledConstraintCorrection /><Node name="quad-surface"><QuadSetTopologyContainer name="myCurve10_001-quadSurf" /><QuadSetGeometryAlgorithms template="Vec3d" /><QuadSetTopologyModifier /><QuadSetTopologyAlgorithms template="Vec3d" /><Hexa2QuadTopologicalMapping input="@../myCurve10_001-topology" output="@myCurve10_001-quadSurf" /><OglModel name="myCurve10_001-visual" /><IdentityMapping input="@../MO" output="@myCurve10_001-visual" /><Node name="triangle-surface"><TriangleSetTopologyContainer name="myCurve10_001-triSurf" /><TriangleSetTopologyModifier /><TriangleSetTopologyAlgorithms template="Vec3d" /><TriangleSetGeometryAlgorithms template="Vec3d" /><Quad2TriangleTopologicalMapping input="@../myCurve10_001-quadSurf" output="@myCurve10_001-triSurf" /><TriangleModel bothSide="0" contactFriction="500.0" contactStiffness="500.0" group="1" moving="1" selfCollision="0" simulated="1" tags="HapticSurfaceCurve" /></Node></Node></Node><Node name="myCurve11_001"><HexahedronSetTopologyContainer hexahedra="0 1 2 3 4 5 6 7 4 5 6 7 8 9 10 11 8 9 10 11 12 13 14 15 12 13 14 15 16 17 18 19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" name="myCurve11_001-topology" points="-0.238166347146 -0.00380775518715 -0.351034253836 -0.237055063248 -0.00522432709113 -0.352803885937 -0.238095656037 -0.00379220466129 -0.354603737593 -0.239206939936 -0.00237563299015 -0.352834105492 -0.237066298723 -0.00295308884233 -0.351492285728 -0.236737415195 -0.0049766395241 -0.352965503931 -0.238640129566 -0.00421333312988 -0.354438722134 -0.238969013095 -0.00218978244811 -0.352965503931 -0.23645144701 -0.00244545936584 -0.352277755737 -0.236395671964 -0.00469357799739 -0.353424966335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" /><MechanicalObject name="MO" rotation="0.0 0.0 0.0 " scale3d="1.0 1.0 1.0 " template="Vec3d" translation="0.0 0.0 0.0 " /><HexahedronSetTopologyModifier removeIsolated="false" /><HexahedronSetTopologyAlgorithms template="Vec3d" /><HexahedronSetGeometryAlgorithms template="Vec3d" /><UniformMass mass="0.009999999776482582" /><HexahedronFEMForceField damping="0.10000000149011612" method="large" poissonRatio="0.44999998807907104" rayleighStiffness="0.0" youngModulus="3000.0" /><DiagonalVelocityDampingForceField dampingCoefficient="0.05 0.05 0.05 0.05 0.05 0.05" template="Vec3d" /><UncoupledConstraintCorrection /><Node name="quad-surface"><QuadSetTopologyContainer name="myCurve11_001-quadSurf" /><QuadSetGeometryAlgorithms template="Vec3d" /><QuadSetTopologyModifier /><QuadSetTopologyAlgorithms template="Vec3d" /><Hexa2QuadTopologicalMapping input="@../myCurve11_001-topology" output="@myCurve11_001-quadSurf" /><OglModel name="myCurve11_001-visual" /><IdentityMapping input="@../MO" output="@myCurve11_001-visual" /><Node name="triangle-surface"><TriangleSetTopologyContainer name="myCurve11_001-triSurf" /><TriangleSetTopologyModifier /><TriangleSetTopologyAlgorithms template="Vec3d" /><TriangleSetGeometryAlgorithms template="Vec3d" /><Quad2TriangleTopologicalMapping input="@../myCurve11_001-quadSurf" output="@myCurve11_001-triSurf" /><TriangleModel bothSide="0" contactFriction="500.0" contactStiffness="500.0" group="1" moving="1" selfCollision="0" simulated="1" tags="HapticSurfaceCurve" /></Node></Node></Node><Node name="myCurve12_001"><HexahedronSetTopologyContainer hexahedra="0 1 2 3 4 5 6 7 4 5 6 7 8 9 10 11 8 9 10 11 12 13 14 15 12 13 14 15 16 17 18 19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" name="myCurve12_001-topology" points="-0.244678303599 0.00806266628206 -0.359526216984 -0.246165946126 0.00693470332772 -0.361103922129 -0.245853707194 0.00875785388052 -0.362701773643 -0.244366064668 0.00988581683487 -0.361124068499 -0.243926152587 0.00761154573411 -0.359859734774 -0.245291054249 0.00640979362652 -0.361492931843 -0.244900658727 0.00818595848978 -0.363126128912 -0.243535757065 0.00938770920038 -0.361492931843 -0.243041872978 0.00709941703826 -0.360178202391 -0.244319885969 0.00584722310305 -0.361843496561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" /><MechanicalObject name="MO" rotation="0.0 0.0 0.0 " scale3d="1.0 1.0 1.0 " template="Vec3d" translation="0.0 0.0 0.0 " /><HexahedronSetTopologyModifier removeIsolated="false" /><HexahedronSetTopologyAlgorithms template="Vec3d" /><HexahedronSetGeometryAlgorithms template="Vec3d" /><UniformMass mass="0.009999999776482582" /><HexahedronFEMForceField damping="0.10000000149011612" method="large" poissonRatio="0.44999998807907104" rayleighStiffness="0.0" youngModulus="3000.0" /><DiagonalVelocityDampingForceField dampingCoefficient="0.05 0.05 0.05 0.05 0.05 0.05" template="Vec3d" /><UncoupledConstraintCorrection /><Node name="quad-surface"><QuadSetTopologyContainer name="myCurve12_001-quadSurf" /><QuadSetGeometryAlgorithms template="Vec3d" /><QuadSetTopologyModifier /><QuadSetTopologyAlgorithms template="Vec3d" /><Hexa2QuadTopologicalMapping input="@../myCurve12_001-topology" output="@myCurve12_001-quadSurf" /><OglModel name="myCurve12_001-visual" /><IdentityMapping input="@../MO" output="@myCurve12_001-visual" /><Node name="triangle-surface"><TriangleSetTopologyContainer name="myCurve12_001-triSurf" /><TriangleSetTopologyModifier /><TriangleSetTopologyAlgorithms template="Vec3d" /><TriangleSetGeometryAlgorithms template="Vec3d" /><Quad2TriangleTopologicalMapping input="@../myCurve12_001-quadSurf" output="@myCurve12_001-triSurf" /><TriangleModel bothSide="0" contactFriction="500.0" contactStiffness="500.0" group="1" moving="1" selfCollision="0" simulated="1" tags="HapticSurfaceCurve" /></Node></Node></Node><Node name="ThickCurve"><HexahedronSetTopologyContainer hexahedra="0 1 2 3 4 5 6 7 4 5 6 7 8 9 10 11 8 9 10 11 12 13 14 15 12 13 14 15 16 17 18 19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" name="ThickCurve-topology" points="-3.54097509384 -0.0752370804548 0.1755245924 -3.45162391663 -0.133465051651 0.0826489925385 -3.49652814865 -0.0436013862491 -0.0168906822801 -3.58587932587 0.0146265625954 0.0759849399328 -3.47007751465 -0.018542021513 0.197142988443 -3.39544558525 -0.086210206151 0.101612128317 -3.43295240402 0.00728925783187 0.00608129054308 -3.50758433342 0.0749574154615 0.101612150669 -3.39164113998 0.0287024788558 0.214844450355 -3.33159804344 -0.0457046441734 0.117777913809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" /><MechanicalObject name="MO" rotation="0.0 0.0 0.0 " scale3d="0.07772011309862137 0.07772011309862137 0.07772011309862137 " template="Vec3d" translation="0.23953238129615784 -0.03128340095281601 0.02681625261902809 " /><HexahedronSetTopologyModifier removeIsolated="false" /><HexahedronSetTopologyAlgorithms template="Vec3d" /><HexahedronSetGeometryAlgorithms template="Vec3d" /><UniformMass mass="0.009999999776482582" /><HexahedronFEMForceField damping="0.10000000149011612" method="large" poissonRatio="0.44999998807907104" rayleighStiffness="0.0" youngModulus="3000.0" /><DiagonalVelocityDampingForceField dampingCoefficient="0.05 0.05 0.05 0.05 0.05 0.05" template="Vec3d" /><UncoupledConstraintCorrection /><Node name="quad-surface"><QuadSetTopologyContainer name="ThickCurve-quadSurf" /><QuadSetGeometryAlgorithms template="Vec3d" /><QuadSetTopologyModifier /><QuadSetTopologyAlgorithms template="Vec3d" /><Hexa2QuadTopologicalMapping input="@../ThickCurve-topology" output="@ThickCurve-quadSurf" /><OglModel name="ThickCurve-visual" /><IdentityMapping input="@../MO" output="@ThickCurve-visual" /><Node name="triangle-surface"><TriangleSetTopologyContainer name="ThickCurve-triSurf" /><TriangleSetTopologyModifier /><TriangleSetTopologyAlgorithms template="Vec3d" /><TriangleSetGeometryAlgorithms template="Vec3d" /><Quad2TriangleTopologicalMapping input="@../ThickCurve-quadSurf" output="@ThickCurve-triSurf" /><TriangleModel bothSide="0" contactFriction="500.0" contactStiffness="500.0" group="1" moving="1" selfCollision="0" simulated="1" tags="HapticSurfaceCurve" /></Node></Node></Node></Node></Node>
